// COMSOL Multiphysics 5.6.0.280 model "timedep_model_TD_linear growth_paper_GitHub.mph"
// Outline of the model tree
// Unit system: none

Parameters
  Hh = 1/3
  Uscale = 1E-6[m/s]  // 1E-6[m/s]
  partitionC = 1
  partitionW = 1
  timescale = 24*3600[s]
  halfWH = 0*1E-11*timescale
  halfWM = 0*1E-11*timescale
  epsilon = 1/30
  L = 1*90E-3[m]
  DCH = 6E-10[m^2/s]
  DCM = 6E-10[m^2/s]
  DWH = 1.2E-9[m^2/s]
  DWM = 1.4E-9[m^2/s]
  Cinf = 0.36
  mu = 1*Uscale*timescale/L
  rho = timescale*nuC*N0
  alpha = Uscale*L
  beta = timescale/(L^2)
  dch = DCH*beta  // 1*
  dcm = DCM*beta  // 1*
  dwh = DWH*beta  // 1*
  dwm = DWM*beta  // 1*
  Cinlet = Cinf/Cinf
  xp = 0
  nuC = 9.4e-17
  N0 = 3.3e10
  p = (1/3)

Functions
  an1: Analytic | funcname = Uvelocity; expr = (y-Hh)^2/(1-Hh)^2; args = y
  an2: Analytic | funcname = Reaction; expr = rho*exp(p*t)*c; args = {c, t}

Couplings
  maxop1: Maximum on domains 1
  minop1: Minimum on domains 1

Common definitions
  minpt1: CommonInputDef "Model Input 1" on domains 1 | value = 310.15[K]

Geometry
  geom1 "Geometry 1" (2D, length unit m)
    r1: Rectangle | size = {1, Hh}
    r2: Rectangle | pos = {0, Hh}; size = {1, 1-Hh}
    fin: Finalize "Form Union"

Physics
  tds: DilutedSpecies "Transport of Diluted Species" on domains 1, 2
    dependent variable C = {C, W}
    cdm1: ConvectionDiffusionMigration "Transport Properties - hydrogel" (default)
      D_C = diag{dch, dch/(epsilon^2), 0}
      D_W = diag{dwh, dwh/(epsilon^2), 0}
    nflx1: NoFlux (default)
    init1: init "Initial Values - media" (default) | initc = {1, 0}
    init2: init "Initial Values - gel" on domains 1
    cdm2: ConvectionDiffusionMigration "Transport Properties - media" on domains 2
      u = {mu*Uvelocity(y), 0, 0}
      D_C = diag{dcm, dcm/(epsilon^2), 0}
      D_W = diag{dwm, dwm/(epsilon^2), 0}
    pac1: PartitionCondition on boundaries 4 | ReverseDirection = 1
    in1: Inflow on boundaries 3 | c0 = {Cinlet, 0}; BoundaryConditionType = FluxDanckwerts
    out1: Outflow on boundaries 7
    reac1: Reactions on domains 1 | R_C = -Reaction(C,t); R_W = +2*Reaction(C,t)
    reac2: Reactions "Reactions SS" (disabled) on domains 1 | R_C = -ReactionSS(C); R_W = +2*ReactionSS(C)

Mesh
  mesh1 "Mesh 1"
    size: MeshSizeDefault | hmax = 0.008; hgrad = 1.05; hauto = 1; custom = on
    ftri1: FreeTri "Free Triangular 1" on remaining entities

Studies
  std1 "Study - time dep"
    time: Transient "Time Dependent" | tlist = range(0,0.05/24,7); useinitsol = on
  std8 "Study - TD sweep in X"
    time: Transient "Time Dependent"
      tlist = range(0,1/24,7)
      usesol = on
      notsolmethod = sol
      notstudy = std1
      useparam = on
      pname = xp
      plistarr = range(0,0.001,1)

Solver configurations
  sol1 "Solution 1" (study std1)
    v1: Variables "Dependent Variables 1"
    t1: Time "Time-Dependent Solver 1" | tlist = range(0,0.05/24,7); rtol = 0.005; maxorder = 2
      fc1: FullyCoupled | maxiter = 8; damp = 0.9; jtech = once; stabacc = aacc; aaccdim = 5; aaccmix = 0.9; aaccdelay = 1
      d1: Direct | linsolver = pardiso; pivotperturb = 1.0E-13
  sol4 "Solution 4" (study std8)
    v1: Variables "Dependent Variables 1"
    t1: Time "Time-Dependent Solver 1" | tlist = range(0,1/24,7); rtol = 0.005; maxorder = 2
      tp1: TimeParametric
      fc1: FullyCoupled
        linsolver = d1
        maxiter = 8
        damp = 0.9
        jtech = once
        stabacc = aacc
        aaccdim = 5
        aaccmix = 0.9
        aaccdelay = 1
      d1: Direct | linsolver = pardiso; pivotperturb = 1.0E-13

Datasets
  dset1: Solution | solution = sol1
  pc2: ParCurve2D "Parameterized Curve 2D - (TD sweep X)" | data = dset6; exprx = xp; expry = s
  dset6: Solution | solution = sol4
  an2_ds1: Grid2D

Derived values
  av8: AvLine "Line Average - av C (TD)" | data = pc2; table = tbl34; expr = C
  av9: AvLine "Line Average - av W (TD)" | data = pc2; table = tbl35; expr = W
  min1: MinLine "Line Minimum - min(C,W)" (disabled)
    data = pc2
    table = new
    expr = {C, W}
    descr = {minC_Concentration, minW_Concentration}
  max1: MaxLine "Line Maximum - max(C,W)" (disabled)
    data = pc2
    expr = {C, W}
    descr = {maxC_Concentration, maxW_Concentration}
  min2: MinSurface "Surface Minimum - min(C,W)" on domains 1
    data = dset1
    table = tbl36
    expr = {C, W}
    descr = {minC_conc, minW_conc}
  max2: MaxSurface "Surface Maximum - max(C,W)" on domains 1
    data = dset1
    table = tbl37
    expr = {C, W}
    descr = {maxC_conc, maxW_conc}
  av10: AvLine "Line Average - W outlet - gel" on boundaries 6
    data = dset1
    table = tbl39
    expr = W
    descr = avW_outlet-gel_conc
  av11: AvLine "Line Average - W outlet - media" on boundaries 7
    data = dset1
    table = tbl38
    expr = W
    descr = avW_outlet-media_conc
  av12: AvLine "Line Average - W outlet - RHS" on boundaries 6, 7
    data = dset1
    table = tbl40
    expr = W
    descr = avW_outlet-RHS_conc
  max3: MaxSurface "Surface Maximum 3" on domains 1
    data = dset1
    table = tbl41
    expr = {maxop1(W,x), W}
    descr = {position max W, maxW_conc-gel}

Tables
  tbl34: Table "Table - av C conc (TD)"
    // Line Average - av C (TD)
    filename = /home/ellism/Documents/InFoMM/Cellesce/TD_timedep_uptake_Oct20/TD_td-uptake_avC_concentration.txt
    xp | t=0, Concentration | t=0.041667, Concentration | t=0.083333, Concentration | t=0.125, Concentration | t=0.16667, Concentration | t=0.20833, Concentration | t=0.25, Concentration | t=0.29167, Concentration | t=0.33333, Concentration | t=0.375, Concentration | t=0.41667, Concentration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
    0 | 0.666654 | 0.758219 | 0.819279 | 0.85478 | 0.878973 | 0.89688 | 0.910719 | 0.921585 | 0.930546 | 0.938052 | 0.943945
    0.01 | 0.666357 | 0.722559 | 0.784453 | 0.824485 | 0.852682 | 0.873901 | 0.890478 | 0.903617 | 0.914518 | 0.923682 | 0.930934
    0.02 | 0.666641 | 0.697099 | 0.752349 | 0.793821 | 0.824714 | 0.848669 | 0.86775 | 0.883129 | 0.896021 | 0.90693 | 0.915682
    0.03 | 0.666677 | 0.680547 | 0.724884 | 0.764876 | 0.796905 | 0.822736 | 0.84384 | 0.861215 | 0.875972 | 0.888565 | 0.898844
    0.04 | 0.666649 | 0.671535 | 0.703706 | 0.739538 | 0.770861 | 0.797375 | 0.819733 | 0.838621 | 0.854922 | 0.868986 | 0.880704
    0.05 | 0.666647 | 0.666796 | 0.687748 | 0.717924 | 0.747155 | 0.773319 | 0.796198 | 0.816087 | 0.833557 | 0.848824 | 0.86183
    0.06 | 0.666656 | 0.664855 | 0.676756 | 0.700516 | 0.726485 | 0.751275 | 0.773874 | 0.794156 | 0.812327 | 0.828443 | 0.842507
    0.07 | 0.666662 | 0.664305 | 0.669729 | 0.687153 | 0.709128 | 0.731708 | 0.753285 | 0.773344 | 0.791709 | 0.808278 | 0.823111
    0.08 | 0.666665 | 0.6643 | 0.665368 | 0.677049 | 0.694752 | 0.714579 | 0.734572 | 0.753886 | 0.771993 | 0.788648 | 0.803959
    0.09 | 0.666667 | 0.664489 | 0.663048 | 0.669946 | 0.683414 | 0.700136 | 0.71807 | 0.736147 | 0.753544 | 0.769899 | 0.785357
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  tbl35: Table "Table - av W conc (TD)"
    // Line Average - av W (TD)
    filename = /home/ellism/Documents/InFoMM/Cellesce/TD_timedep_uptake_Oct20/TD_td-uptake_avW_concentration.txt
    xp | t=0, Concentration | t=0.041667, Concentration | t=0.083333, Concentration | t=0.125, Concentration | t=0.16667, Concentration | t=0.20833, Concentration | t=0.25, Concentration | t=0.29167, Concentration | t=0.33333, Concentration | t=0.375, Concentration | t=0.41667, Concentration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
    0 | 3.26338e-08 | 0.00319848 | 0.00692122 | 0.0103569 | 0.0135345 | 0.0165026 | 0.0192952 | 0.021936 | 0.0244554 | 0.0268656 | 0.0291627
    0.01 | 3.15293e-08 | 0.00337744 | 0.00744622 | 0.0112402 | 0.0147672 | 0.0180728 | 0.0211903 | 0.0241439 | 0.0269651 | 0.0296666 | 0.0322444
    0.02 | 3.2281e-08 | 0.00348688 | 0.00783215 | 0.0119438 | 0.0157984 | 0.0194313 | 0.0228717 | 0.0261419 | 0.0292724 | 0.0322753 | 0.0351468
    0.03 | 3.27282e-08 | 0.00355175 | 0.0081073 | 0.0124872 | 0.0166341 | 0.0205696 | 0.024316 | 0.0278921 | 0.0313252 | 0.034626 | 0.0377914
    0.04 | 3.24693e-08 | 0.00358574 | 0.00828649 | 0.0128759 | 0.0172674 | 0.0214677 | 0.0254906 | 0.0293498 | 0.0330676 | 0.0366528 | 0.0401028
    0.05 | 3.24511e-08 | 0.00360396 | 0.00840589 | 0.0131588 | 0.0177538 | 0.0221838 | 0.0264539 | 0.0305721 | 0.0345547 | 0.0384077 | 0.0421297
    0.06 | 3.24722e-08 | 0.00361232 | 0.00847938 | 0.0133527 | 0.0181092 | 0.0227311 | 0.0272151 | 0.0315637 | 0.0357864 | 0.0398864 | 0.0438632
    0.07 | 3.25129e-08 | 0.00361571 | 0.00852288 | 0.0134816 | 0.0183624 | 0.0231399 | 0.0278047 | 0.0323538 | 0.03679 | 0.0411137 | 0.0453253
    0.08 | 3.25314e-08 | 0.00361694 | 0.00854894 | 0.0135683 | 0.0185444 | 0.0234479 | 0.0282646 | 0.0329875 | 0.0376125 | 0.0421379 | 0.0465646
    0.09 | 3.25373e-08 | 0.0036171 | 0.00856301 | 0.0136226 | 0.018668 | 0.023669 | 0.028609 | 0.0334776 | 0.0382653 | 0.0429682 | 0.0475879
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  tbl36: Table "Table - min metab in gel"
    // Surface Minimum - min(C,W)
    filename = /home/ellism/Documents/InFoMM/Cellesce/TD_timedep_uptake_Oct20/comsol_data_paper/td-uptake_MM_min_CW_conc.txt
    Time | minC_conc | minW_conc
    0 | -7.00401e-05 | -6.92707e-11
    1 | 0.617239 | 0.0440519
    2 | 0.555674 | 0.0722905
    3 | 0.492521 | 0.102869
    4 | 0.45284 | 0.141487
    5 | 0.408782 | 0.191512
    6 | 0.327627 | 0.255842
    7 | 0.222788 | 0.336667
  tbl37: Table "Table - maxc metab in gel"
    // Surface Maximum - max(C,W)
    filename = /home/ellism/Documents/InFoMM/Cellesce/TD_timedep_uptake_Oct20/comsol_data_paper/td-uptake_MM_max_CW_conc.txt
    Time | maxC_conc | maxW_conc
    0 | 0.506598 | 7.04581e-07
    1 | 0.971476 | 0.0988977
    2 | 0.971499 | 0.234197
    3 | 0.9613 | 0.415183
    4 | 0.947082 | 0.643957
    5 | 0.928154 | 0.915369
    6 | 0.903383 | 1.21327
    7 | 0.871664 | 1.49296
  tbl38: Table "Table - avW_outlet-media_conc"
    // Line Average - W outlet
    filename = /home/ellism/Documents/InFoMM/Cellesce/TD_timedep_uptake_Oct20/comsol_data_paper/td-uptake_MM_avW-media_conc.txt
    Time | avW_outlet-media_conc
    0 | 1.08763e-08
    1 | 0.0947226
    2 | 0.217951
    3 | 0.379621
    4 | 0.607187
    5 | 0.897584
    6 | 1.20688
    7 | 1.48665
  tbl39: Table "Table - avW_outlet-gel_conc"
    // Line Average - W outlet - gel
    filename = /home/ellism/Documents/InFoMM/Cellesce/TD_timedep_uptake_Oct20/comsol_data_paper/td-uptake_MM_avW-gel_conc.txt
    Time | avW_outlet-gel_conc
    0 | 4.69002e-08
    1 | 0.096623
    2 | 0.220332
    3 | 0.382476
    4 | 0.610757
    5 | 0.902197
    6 | 1.21228
    7 | 1.49196
  tbl40: Table "Table - avW_outlet-RHS"
    // Line Average - W outlet - RHS
    filename = /home/ellism/Documents/InFoMM/Cellesce/TD_timedep_uptake_Oct20/comsol_data_paper/td-uptake_MM_avW-RHS_conc.txt
    Time | avW_outlet-RHS_conc
    0 | 2.28843e-08
    1 | 0.095356
    2 | 0.218745
    3 | 0.380573
    4 | 0.608377
    5 | 0.899121
    6 | 1.20868
    7 | 1.48842
  tbl41: Table "Table - position and value max(W) - gel"
    // Surface Maximum 3
    filename = /home/ellism/Documents/InFoMM/Cellesce/TD_timedep_uptake_Oct20/comsol_data_paper/td-uptake_MM_maxW_position_conc.txt
    Time | position max W | maxW_conc-gel
    0 | 0.987739 | 7.04581e-07
    1 | 0.304 | 0.0988977
    2 | 0.444 | 0.234197
    3 | 0.568 | 0.415183
    4 | 0.688 | 0.643957
    5 | 0.804 | 0.915369
    6 | 1 | 1.21327
    7 | 1 | 1.49296

Plots
  pg3: PlotGroup2D "Concentration, C - time dep" | data = dset1; prefixintitle = Species C:; xlabel = X; ylabel = Z
    surf1: Surface | expr = C; descr = Concentration; typeintitle = off; unitintitle = off
    str1: Streamline (disabled)
      expr = {tds.tflux_Cx, tds.tflux_Cy}
      pointtype = arrow
      arrowcount = 26
      arrowlength = logarithmic
      arrowscale = 2.78199304708e+22
  pg8: PlotGroup2D "Concentration, C dim - time dep" | data = dset1; prefixintitle = Species C:; xlabel = X; ylabel = Z
    surf1: Surface "Surface - c dim" | expr = C*Cinf; unit = mol/m^2; descr = glucose concentration; typeintitle = off
    str1: Streamline (disabled)
      expr = {tds.tflux_Cx, tds.tflux_Cy}
      pointtype = arrow
      arrowcount = 26
      arrowlength = logarithmic
      arrowscale = 2.78199304708e+22
  pg4: PlotGroup2D "Concentration, W - time dep" | data = dset1; prefixintitle = Species W:; xlabel = X; ylabel = Z
    surf1: Surface | expr = W; unit = mol/m^2; typeintitle = off; unitintitle = off
    str1: Streamline (disabled)
      expr = {tds.tflux_Wx, tds.tflux_Wy}
      pointtype = arrow
      arrowlength = logarithmic
      arrowscale = 1.05607665839
  pg7: PlotGroup2D "Concentration, W dim - time dep" | data = dset1; prefixintitle = Species W:; xlabel = X; ylabel = Z
    str1: Streamline (disabled)
      expr = {tds.tflux_Wx, tds.tflux_Wy}
      pointtype = arrow
      arrowlength = logarithmic
      arrowscale = 1.05607665839
    surf2: Surface "Surface - w dim" | expr = W*Cinf; unit = mol/m^2; descr = lactate concentration, w; typeintitle = off

Exports
  tbl5: Table "Table - av C (TD)"
    table = tbl34
    filename = /home/ellism/Documents/InFoMM/Cellesce/TD_timedep_uptake_Oct20/Untitled.txt
  tbl6: Table "Table - av W (TD)" | table = tbl35; filename = TD_td-uptake_avW_concentration
  data1: Data
    data = dset1
    expr = C
    filename = /home/ellism/Documents/InFoMM/Cellesce/TD_timedep_uptake_Oct20/COMSOL_data/TD_growth_comsol_C_p6_M.txt
    pattern = gauss
  data2: Data
    data = dset1
    expr = {W, }
    filename = /home/ellism/Documents/InFoMM/Cellesce/TD_timedep_uptake_Oct20/COMSOL_data/TD_growth_comsol_W_p1_M.txt
    regulargridx2 = 100
    regulargridy2 = 100
    pattern = gauss